// COMSOL Multiphysics 6.4.0.293 model "electrostatic_electric_sensors.mph"
// Electric Sensor
// This example shows how to image the interior permittivity of a box by applying a potential difference on the boundaries of the box. The result is a surface charge density that depends on the permittivity of the medium inside the box.
// Outline of the model tree

Geometry
  geom1 "Geometry 1" (3D, length unit m)
    wp1: WorkPlane | quickz = 0.1; unite = on
      r1: Rectangle | size = {0.5, 2}; pos = {-1, 0.5}
      r2: Rectangle | size = {1.5, 0.25}; pos = {-1.5, 1}
      r3: Rectangle | size = {1.5, 0.25}; pos = {-1.5, 1.75}
      uni1: Union | input = r1, r2, r3; intbnd = off; edge = all
      e1: Ellipse | semiaxes = {0.5, 1}; pos = {1.5, 1.5}
      e2: Ellipse | semiaxes = {1, 0.5}; pos = {1.5, 1.5}
      co1: Compose | input = e1, e2; formula = e1+e2; intbnd = off; edge = all
    ext1: Extrude | workplane = wp1; input = wp1; distance = 0.8
    blk1: Block | size = {5, 3, 1}; pos = {-2, 0, 0}
    fin: Finalize "Form Union"

Materials
  mat1: Common "Material 1" on domains 2
    def: def "Basic"
      relpermittivity = 2
  mat2: Common "Material 2" on domains 3
    def: def "Basic"
      relpermittivity = 3

Physics
  es: Electrostatics on all domains
    dependent variable V
    fsp1: FreeSpace (default)
    zc1: ZeroCharge (default)
    init1: init "Initial Values 1" (default)
    ccnf1: ChargeConservationFluid "Charge Conservation in Fluids 1" on domains 2, 3
    gnd1: Ground on boundaries 3
    pot1: ElectricPotential on boundaries 4 | V0 = 1

Mesh
  mesh1 "Mesh 1" (physics-controlled)

Studies
  std1 "Study 1"
    stat: Stationary

Solver configurations
  sol1 "Solution 1" (study std1)
    v1: Variables "Dependent Variables 1"
    s1: Stationary "Stationary Solver 1"
      fc1: FullyCoupled
      i1: Iterative
        mg1: Multigrid

Datasets
  dset1: Solution on boundaries 3-5, 38 | solution = sol1

Plots
  pg1: PlotGroup3D "3D Plot Group 1" | data = dset1
    surf1: Surface | expr = es.nD; unit = pC/m^2; descr = Surface charge density
    str1: Streamline | expr = {es.Ex, es.Ey, es.Ez}; linetype = tube
      col1: Color "Color Expression 1" | expr = es.normE; descr = Electric field norm

Exports
  anim1: Animation | giffilename = C:\Users\Mahsa\Downloads\electrostatic_electric_sensors.gif; sweeptype = dde